# Two pure-classical windows with distinct geometries sharing one CUDA owner.
# The different second-water displacement makes slot cross-talk observable in
# the broker and force-publication path.

plugin load ${dprc_plugin}
variable        frame_shift world 0.0 0.23

units           real
atom_style      full
atom_modify     map array
boundary        p p p

region          cell prism 0 20 0 18.8561808316 0 16.3299316186 &
                -6.6666666667 -6.6666666667 -9.4280904158 units box
create_box      2 cell bond/types 1 angle/types 1 extra/bond/per/atom 2 &
                extra/angle/per/atom 1 extra/special/per/atom 2

create_atoms    1 single -2.6666667 4.7140452 8.1649658 units box
create_atoms    2 single -1.7094667 4.7140452 8.1649658 units box
create_atoms    2 single -2.9066539 5.6406724 8.1649658 units box
create_atoms    1 single 5.4000000 9.1000000 4.6000000 units box
create_atoms    2 single 6.2870000 9.4100000 4.4100000 units box
create_atoms    2 single 5.0880000 9.9820000 4.4480000 units box
group           shifted_water id 4:6
displace_atoms  shifted_water move ${frame_shift} 0.0 0.0 units box

mass            1 15.999
mass            2 1.008
set             type 1 charge -1.040
set             type 2 charge 0.520
set             atom 1*3 mol 1
set             atom 4*6 mol 2

create_bonds    single/bond 1 1 2
create_bonds    single/bond 1 1 3
create_bonds    single/angle 1 2 1 3
create_bonds    single/bond 1 4 5
create_bonds    single/bond 1 4 6
create_bonds    single/angle 1 5 4 6
bond_style      harmonic
bond_coeff      1 450.0 0.9572
angle_style     harmonic
angle_coeff     1 55.0 104.52

pair_style      hybrid/overlay lj/cut/dprc/batch 8.0 &
                tip4p/long/dprc/batch 1 2 1 1 0.1546 8.0
pair_coeff      * * lj/cut/dprc/batch 0.0 1.0
pair_coeff      1 1 lj/cut/dprc/batch 0.1521 3.1507
pair_coeff      1*2 1*2 tip4p/long/dprc/batch
pair_modify     pair lj/cut/dprc/batch tail yes
special_bonds   amber
kspace_style    pppm/tip4p/dprc/batch 1.0e-6
kspace_modify   mesh 16 16 16 order 4 gewald 0.30
fix             classical all dprc/classical/batch

thermo          1
thermo_style    custom step pe evdwl ecoul elong pxx pyy pzz pxy pxz pyz
run             0
