# End-to-end comparison for the single-owner batched LJ/TIP4P/PPPM path.

plugin load ${dprc_plugin}

units           real
atom_style      ${atom_style}
atom_modify     map array
boundary        p p p

read_data       ${data_file}
group           qm id 1 2

bond_style      ${bond_style}
bond_coeff      1 450.0 0.9572
angle_style     ${angle_style}
angle_coeff     1 55.0 104.52

pair_style      ${hybrid_style} ${lj_style} 8.0 &
                ${coulomb_style} 2 3 1 1 0.1546 8.0
pair_coeff      * * ${lj_style} 0.10 0.50
pair_coeff      2*3 2*3 ${coulomb_style}
pair_modify     pair ${lj_style} tail yes
kspace_style    ${kspace_style} 1.0e-5
kspace_modify   mesh 16 16 16 order 4 gewald 0.30
fix             qmmm qm ${qmmm_style} elements H O H cutoff 8.0 &
                method gfn2 charge 0 uhf 0 accuracy 1.0e-3 maxiter 250 &
                etemp 300.0 mmhardness 0.0
run_style       ${run_style_name}

variable        q1 equal q[1]
variable        q2 equal q[2]
variable        fx1 equal fx[1]
variable        fy1 equal fy[1]
variable        fz1 equal fz[1]
variable        fx2 equal fx[2]
variable        fy2 equal fy[2]
variable        fz2 equal fz[2]
variable        fx3 equal fx[3]
variable        fy3 equal fy[3]
variable        fz3 equal fz[3]
variable        fx4 equal fx[4]
variable        fy4 equal fy[4]
variable        fz4 equal fz[4]
variable        fx5 equal fx[5]
variable        fy5 equal fy[5]
variable        fz5 equal fz[5]
compute         config_pressure all pressure NULL virial
thermo          1
thermo_style    custom step pe f_qmmm v_q1 v_q2 v_fx1 v_fy1 v_fz1 v_fx2 v_fy2 v_fz2 &
                v_fx3 v_fy3 v_fz3 v_fx4 v_fy4 v_fz4 v_fx5 v_fy5 v_fz5 &
                c_config_pressure[1] c_config_pressure[2] c_config_pressure[3] &
                c_config_pressure[4] c_config_pressure[5] c_config_pressure[6]
run             0

print "energy=$(pe:%.16e) correction=$(f_qmmm:%.16e) q1=$(v_q1:%.16e) q2=$(v_q2:%.16e) fx1=$(v_fx1:%.16e) fy1=$(v_fy1:%.16e) fz1=$(v_fz1:%.16e) fx2=$(v_fx2:%.16e) fy2=$(v_fy2:%.16e) fz2=$(v_fz2:%.16e) fx3=$(v_fx3:%.16e) fy3=$(v_fy3:%.16e) fz3=$(v_fz3:%.16e) fx4=$(v_fx4:%.16e) fy4=$(v_fy4:%.16e) fz4=$(v_fz4:%.16e) fx5=$(v_fx5:%.16e) fy5=$(v_fy5:%.16e) fz5=$(v_fz5:%.16e) pxx=$(c_config_pressure[1]:%.16e) pyy=$(c_config_pressure[2]:%.16e) pzz=$(c_config_pressure[3]:%.16e) pxy=$(c_config_pressure[4]:%.16e) pxz=$(c_config_pressure[5]:%.16e) pyz=$(c_config_pressure[6]:%.16e)" file ${result_file} screen no
